# LAMMPS INPUT FILE PERFORMING THE GENERATION AND PREPARATION OF THE SAMPLE UNDER ISOTROPIC COMPRESSION OF 3D GRANULAR SYSTEMS
# file: in.MAIN_sample_preparation_3
# author: JBC @ NORTHWESTERN UNIVERSITY, (jibril.coulibaly@gmail.com)
#
# Copyright (C) 2023 Mechanics and Energy Laboratory, Northwestern University
#
# This program is free software: you can redistribute it and/or modify
# it under the terms of the GNU General Public License as published by
# the Free Software Foundation, either version 3 of the License, or
# (at your option) any later version.
#
# This program is distributed in the hope that it will be useful,
# but WITHOUT ANY WARRANTY; without even the implied warranty of
# MERCHANTABILITY or FITNESS FOR A PARTICULAR PURPOSE.  See the
# GNU General Public License for more details.
#
# THIS IS A MAIN SCRIPT. ALL VARIABLES AND COMPUTES IN THIS SUBSCRIPT ARE GLOBAL AND GIVEN DEFAULT VALUES THAT CAN BE OVERWRITTEN LOCALLY IN THE MAIN SCRIPT
# THIS SCRIPT MUST ONLY BE CALLED ONE TIME
#
#
# INFO :
# - THERE ARE CURRENTLY ISSUES WITH TRICLINIC CELLS AND POLYDISPERSE GRANULAR MODELS. WE MUST USE ORTHOGONAL BOX
#
# TODO:
# - Later when we go back to clumps. Maybe do a single file DEF_init_material with clump and PSD info
# -

####################
# ---- HEADER ---- #
####################

# ---- INITIALIZATION OF LAMMPS REQUIREMENTS, PARTICLE TYPES, MATERIAL ---- #
#
include in.DEF_init_pre_3
include in.DEF_init_IO
include in.DEF_init_particles_3
include in.DEF_init_material_3
include in.DEF_init_boundary_3

# ---- DEFINITION OF THE PARAMETERS ---- #
#
include in.DEF_param_sample_preparation_3
include in.DEF_param_simulation_3
include in.DEF_param_BC_control_3
include in.DEF_param_equilibrium_3
include in.DEF_init_post_3

# ---- DETERMINATION OF THE NUMBER OF PARTICLES ON INITIAL LATTICE ---- #
#
variable Nx equal $(round((1.5*v_Nparticles/v_aspectratio)^(1/3))) # Number of particles in horizontal directions X and Y (Augmented by 50% to partially fill the lattice randomly with Nparticles)
variable Nz equal $(v_aspectratio*v_Nx) # Number of particles in vertical direction Z

# ---- DEFINITION OF THE ORTHOGONAL CELL ---- #
#
if "${BC_XX_WALL} && ${BC_YY_WALL} && ${BC_ZZ_WALL}" then &
"region insert block 0.0 $(v_spacing*v_dmax*(v_Nx-0.5)) 0.0 $(v_spacing*v_dmax*(v_Nx-0.5)) 0.0 $(v_spacing*v_dmax*(v_Nz-0.5)) # Initial lattice insertion volume for walls BC" &
"region box block $(-v_spacing*v_dmax*(0.5+v_wallpad)) $(v_spacing*v_dmax*(v_Nx-0.5+v_wallpad)) $(-v_spacing*v_dmax*(0.5+v_wallpad)) $(v_spacing*v_dmax*(v_Nx-0.5+v_wallpad)) $(-v_spacing*v_dmax*(0.5+v_wallpad)) $(v_spacing*v_dmax*(v_Nz-0.5+v_wallpad)) #Initial simulation box for walls BC" &
elif "!${BC_XX_WALL} && !${BC_YY_WALL} && !${BC_ZZ_WALL}" &
"region insert block 0.0 $(v_spacing*v_dmax*v_Nx) 0.0 $(v_spacing*v_dmax*v_Nx) 0.0 $(v_spacing*v_dmax*v_Nz) # Initial lattice insertion volume for periodic BC" &
"region box block $(-v_spacing*v_dmax*0.5) $(v_spacing*v_dmax*(v_Nx-0.5)) $(-v_spacing*v_dmax*0.5) $(v_spacing*v_dmax*(v_Nx-0.5)) $(-v_spacing*v_dmax*0.5) $(v_spacing*v_dmax*(v_Nz-0.5)) # Initial simulation box for periodic BC" &
else &
"print 'Script Error: boundaries must either all be periodic or all have walls. Flags BC_AXIS_WALL were given $(v_BC_XX_WALL), $(v_BC_YY_WALL) and $(v_BC_ZZ_WALL)'" &
"quit"

create_box 3 box # General number of atom types: 1=real atoms and center of clumps (for convenience), 2=dummy atoms for boundary control, 3=non-center atoms of clumps

# ---- MATERIAL AND CONTACT LAW ---- #
#
pair_style	granular
pair_coeff * * hertz/material $E ${ncdc} ${nu} tangential mindlin_rescale/force NULL ${tcdr} 0.0 rolling sds 0.0 0.0 0.0 twisting ${twistmodel} # Frictionless for initial mixing and percolation to target packing fraction

# ---- CREATION OF THE PARTICLES AND DUMMY PARTICLES FOR BOUNDARY CONTROL ---- #
#

lattice sc $(v_spacing*v_dmax) # Definition of the deposition lattice
if "${SPHERE}" then "create_atoms 1 region insert subset ${Nparticles} ${latseed} # Create real particles on a cubic lattice in the insertion region with density pflat" &
elif "!${SPHERE}" &
"molecule mol_poly_clump ${clump_filename} scale ${dmax} # All particles are initially inserted at size dmax to avoid wrapping around PBCs" &
"create_atoms 0 region insert mol mol_poly_clump ${orientseed} subset ${Nparticles} ${latseed} # Create real particles on a cubic lattice in the insertion region with density pflat" &
else "print 'Script Error: flag SPHERE should have value true or false and was given $(v_SPHERE)'" "quit"

create_atoms 2 single $(0.5*(xhi+xlo)) $(0.5*(yhi+ylo)) $(0.5*(zhi+zlo)) units box # Create dummy particle for volumetric control of boundaries
create_atoms 2 single $(0.5*(xhi+xlo)) $(0.5*(yhi+ylo)) $(0.5*(zhi+zlo)) units box # Create dummy particle for shear/tilt control boundaries
set type 2 diameter ${dmax} # Necessary for correct cutoff
set type 2 mass $(v_Nparticles^(2/3)*v_msys) # mass of boundary = Approximate mass of all particles facing one boundary

# ---- SETUP OF THE BOUNDARY CONDITIONS, STRUCTURES, RIGID BODIES (if clumps), POLYDISPERSITY AND CONVERGENCE ---- #
#

variable READWALL equal false # Determine wall coordinates from current box dimensions and wall padding. Hardcoded: walls (if any) always created during sample preparation
include in.SET_structure_3
include in.SET_boundary_3
include in.SET_macro_properties_3

if "${SPHERE} && !${READPSD}" then "variable drand atom random(${dmin},${dmax},${dseed}) # Random generation of particles diameters, reference case for coding fallback" &
elif "${SPHERE} && ${READPSD}" "variable drand atomfile ${fname_read_PSD} # Random particles diameters picked from the selected PSD" &
elif "!${SPHERE} && !${READPSD}" "variable drand atom random($(v_dmin/v_dmax),1,${dseed}) # Random generation of particles diameters, scaling from dmax, reference case for coding fallback" &
elif "!${SPHERE} && ${READPSD}" "variable drand0 atomfile ${fname_read_PSD}" "variable drand atom v_drand0/v_dmax # Random particles diameters picked from the selected PSD, scaling from dmax"

if "${SPHERE}" then &
"set type 1 diameter v_drand" &
"set type 1 density ${rho}" &
"fix time_integration_particles particles nve/sphere" &
elif "!${SPHERE}" &
"fix same_rand all store/state 0 v_drand" &
"fix diam0 all store/state 0 diameter # Store initial diameter" &
"variable same_rand atom f_same_rand" &
"compute randclump centers reduce/chunk chunk_clump min v_same_rand # per-clump number of contact" &
"compute randparticles_spread particles chunk/spread/atom chunk_clump c_randclump # Real number of contact per chunk spread back onto atoms (coordination number z of clump the atom belongs to)" &
"compute com_coordu_initializer particles reduce max c_com_clump_global[1] c_coordu_particles[1] c_randparticles_spread # to initialize the com and coordu computes" &
"thermo_style custom step c_com_coordu_initializer[1] c_com_coordu_initializer[2] c_com_coordu_initializer[3]" &
"run 0" &
"variable massnew atom 'mass*v_rho*c_randparticles_spread^3'" &
"variable diamnew atom 'f_diam0*c_randparticles_spread'" &
"variable xnew atom c_com_clump_global[1]+c_randparticles_spread*(c_coordu_particles[1]-c_com_clump_global[1]) # Remapped unwrapped new xu coordinates of all particles in all clumps" &
"variable ynew atom c_com_clump_global[2]+c_randparticles_spread*(c_coordu_particles[2]-c_com_clump_global[2]) # Remapped unwrapped new yu coordinates of all particles in all clumps" &
"variable znew atom c_com_clump_global[3]+c_randparticles_spread*(c_coordu_particles[3]-c_com_clump_global[3]) # Remapped unwrapped new zu coordinates of all particles in all clumps" &
"set group particles x v_xnew y v_ynew z v_znew diameter v_diamnew mass v_massnew" &
"unfix diam0" &
"uncompute com_coordu_initializer" &
"fix time_integration_clumps particles rigid/small molecule" "fix_modify time_integration_clumps bodyforces early # forces must be calculated early for per-clump damping to work" &
else "print 'Script Error: flag SPHERE should have value true or false and was given $(v_SPHERE)'" "quit"

include in.SET_conv_3


#################################
# ---- MIXING OF PARTICLES ---- #
#################################

## MINIMUM PACKING FRACTION FOR MIXING

thermo_style custom step v_pf # initialize packing fraction
run 0 # initialize packing fraction
if "${pf} > ${pfmin}" then "change_box all x scale $((v_pf/v_pfmin)^(1/3)) y scale $((v_pf/v_pfmin)^(1/3)) z scale $((v_pf/v_pfmin)^(1/3)) remap units box # Corrected dimensions of 3D simulation box, not sure that works with walls ? It should because remapped"

## MIXING

fix pos0 centers store/state 0 x y z
fix pos1 centers store/state ${Ncheck} xu yu zu # should I store ever Ncheck?
variable travel atom " sqrt((f_pos0[1]-f_pos1[1])^2 + (f_pos0[2]-f_pos1[2])^2 + (f_pos0[3]-f_pos1[3])^2)/v_dsys"
compute pos2 centers reduce ave v_travel # Displacement of particle relative to its diameter

variable haltmix equal "c_pos2 >= v_mixamount"
fix stopmix all halt ${Ncheck} v_haltmix == 1 error continue

variable mixtemp equal $(v_msys*(v_mixintensity*v_dsys/v_tsyshertz_kn)^2/(3*1.380e-23)) # Equivalent temperature for average mixing velocity based on gas kinetic theory T=mv^2/3kb (Boltzmann constant kb=1.380e-23)
velocity particles create ${mixtemp} ${mixseed} temp temp_sphere
run 0
velocity particles scale ${mixtemp} temp temp_sphere
thermo_style custom step c_pos2
thermo ${Nthermo}
run ${Nmax} # will be stopped when mixing criterion met

unfix pos0
unfix pos1
uncompute pos2
variable haltmix delete
unfix stopmix
variable mixamount delete

change_box all x scale $(1+v_contact_expansion) y scale $(1+v_contact_expansion) z scale $(1+v_contact_expansion) remap units box # Uniform expansion to make sure there is no contact left
velocity all set 0.0 0.0 0.0


##################################################################
# ---- PERCOLATION SHRINKAGE TO THE TARGET PACKING FRACTION ---- #
##################################################################

if "${SPHERE}" then "fix damping_particles particles damping/cundall ${cundamp0} ${cundamp0}" &
elif "!${SPHERE}" "fix damping_particles particles cundamp/rigid time_integration_clumps ${cundamp0} ${cundamp0}" &
else "print 'Script Error: flag SPHERE should have value true or false and was given $(v_SPHERE)'" "quit"

fix gravity_particles particles gravity ${gravity_mag} vector ${gravity_x} ${gravity_y} ${gravity_z}

## PERCOLATION SHRINKAGE

variable In0 equal ${In0_percolation} # Overwrite the inertial number to large values for percolation
fix percolation particles deform 1 x trate -${ratemax} y trate -${ratemax} z trate -${ratemax} remap x

variable haltpercolation equal "v_pf > v_pf0" # Run halted when desired packing reached
fix stoppercolation all halt 1 v_haltpercolation == 1 error continue # Shrinkage is very quick, muste be checked for convergence every timestep to avoid high overlap

thermo_style custom step temp ke press v_pf
thermo_modify temp temp_sphere # take into account sphere DOFs
thermo ${Nthermo} # Normalize
run ${Nmax} # will be stopped when good packing fraction reached

velocity all set 0.0 0.0 0.0
unfix percolation
unfix stoppercolation
variable haltpercolation delete

## RELAXING TO A STATE WITH NO CONTACT AND SIMILAR PACKING FRACTION

variable Plim equal "(v_E/(1-v_nu^2))*(v_relax_overlap^(3/2))" # Limit pressure corresponding to the overlap, determined from overlap and material properties using stiffness number formula
variable haltrelax equal "press < v_Plim" # Why we use press and not v_press ?
fix relax all halt ${Ncheck} v_haltrelax == 1 error continue # variable hatlrelax called *during* the run so frequency of that fix has no pressure to be tallied timestep requirements

thermo ${Nthermo} # That thermo must invoke pressure for fixhalt to work
run ${Nmax} # will stop when average overlap is met

unfix relax
variable haltrelax delete
variable Plim delete
variable expansion delete

change_box all x scale $(1+5*v_relax_overlap) y scale $(1+5*v_relax_overlap) z scale $(1+5*v_relax_overlap) remap units box # Expansion multiplied by 5 to make sure there is no contact left
velocity all set 0.0 0.0 0.0
set group all omega 0.0 0.0 0.0
run ${Nthermo} # Use a to be / newly defined Nshort? Visual verification in thermo output that all contacts have been separated (no pressure, no kinetic energy)


##########################################################
# ---- ISOTROPIC COMPRESSION TO THE TARGET PRESSURE ---- #
##########################################################

pair_coeff * * hertz/material $E ${ncdc} ${nu} tangential mindlin_rescale/force NULL ${tcdr} $f rolling sds ${kroll} ${rrdc} ${froll} twisting ${twistmodel} # Contact law with friction, rolling, twisting resistance

## First run, equilibrate pressure

variable P0 equal ${Ppreparation} # Overwrite reference pressure to pressure chosen for sample preparation
variable In0 equal ${In0_pressure} # Overwrite the inertial number to smaller value for compression
variable remap_save equal $(v_REMAP) # Save the value of REMAP passed to the script for later use
variable REMAP equal true # Initial compaction always using remapping to ensure homogeneous compaction
include in.SET_ref_conf_3 # Defines a reference configuration for the compression (necessary for boundary controller)

variable SHEARRELAX equal false # No shear/tilt relax - orthogonal box
include in.PRESET_BC_control_ISO_3 # preset isotropic conditions to target pressure
include in.START_BC_control_3 # Start Boundary controller

include in.PRESET_equilibrium_stress_3 # Sets equilibrium conditions on stress only
include in.START_equilibrium_3 # Start equilibrium check

thermo_style custom step v_pxx v_pyy v_pzz v_pxy v_pxz v_pyz v_lx v_ly v_lz xy xz yz v_pf c_zmax
thermo ${Nthermo}
run ${Nmax} # Will be stopped at equilibrium

## Second run, equilibrate system

variable In0 equal ${In0_equilibrium} # Overwrite the inertial number to small value for equilibration
variable REMAP equal $(v_remap_save) # Retrieve remapping value passed to script

include in.PRESET_equilibrium_all_3 # Sets equilibrium conditions on all variables
include in.STOP_BC_control_3 # Must do stop / start to change the remapping properties
include in.START_BC_control_3
if "${SPHERE}" then "fix damping_floaters_visct floaters viscous ${viscdamp_lin}" "fix damping_floaters_viscr floaters viscous/sphere ${viscdamp_rot}" &
elif "!${SPHERE}" "fix damping_floaters floaters viscous/rigid time_integration_clumps ${viscdamp_lin} ${viscdamp_rot}" &
else "print 'Script Error: flag SPHERE should have value true or false and was given $(v_SPHERE)'" "quit"

thermo_style custom step v_convke v_convufr v_convfres v_convtqres v_pxx v_pyy v_pzz v_pxy v_pxz v_pyz v_lx v_ly v_lz xy xz yz v_pf
thermo ${Nthermo}
run ${Nmax} # Will be stopped at equilibrium
include in.STOP_BC_control_3 # Stop Boundary controller
include in.STOP_equilibrium_3 # Stop equilibrium check

set group floaters omega 0.0 0.0 0.0 # Kill completely velocity of floaters
velocity floaters set 0.0 0.0 0.0 # Kill completely velocity of floaters

###########################################
# ---- OUTPUT / SAVE SYSTEM GEOMETRY ---- #
###########################################

# Walls coordinates

variable fname_write_wall string "${pathstr}/wall.sample_preparation_3${suffixstr}" # Name of wall file written with absolute path

if '${BC_XX_WALL} && ${BC_YY_WALL} && ${BC_ZZ_WALL}' then &
'print """# Position of the walls after initial deposition
$(v_xlo_BC) # xlo wall
$(v_xhi_BC) # xhi wall
$(v_ylo_BC) # ylo wall
$(v_yhi_BC) # yhi wall
$(v_zlo_BC) # zlo wall
$(v_zhi_BC) # zhi wall """ file ${fname_write_wall}'

# Particles coordinates and topology

variable fname_write_dump_co string "${pathstr}/dump.co_sample_preparation_3${suffixstr}.lammpstrj" # Name of coordinates dump file written with absolute path
dump savedmpcoor particles custom 1 ${fname_write_dump_co} id x y z diameter
dump_modify savedmpcoor sort id

variable fname_write_dump_topo string "${pathstr}/dump.topo_sample_preparation_3${suffixstr}.lammpstrj" # Name of topology dump file written with absolute path
compute savepair particles property/local patom1 patom2 cutoff radius # pairs of particles within force cutoff
compute savecontact particles pair/local force p4 p10 p11 p12 cutoff radius # interparticle distance, normal force magnitude, tangent force magnitude, branch vector x, y, z
dump savedmptopo particles local 1 ${fname_write_dump_topo} c_savepair[*] c_savecontact[*]

run 0 # To output final coordinates and neighbor list

# Restart / data file

variable fname_write_restart string "${pathstr}/restart.sample_preparation_3${suffixstr}" # Name of restart file written with absolute path
write_restart ${fname_write_restart}
variable fname_write_data string "${pathstr}/data.sample_preparation_3${suffixstr}" # Name of data file written with absolute path
write_data ${fname_write_data}
